OpenVSP model (file version 5), 18 components.
Geometry view with OpenVSP parameter names; values to 6 digits, angles in degrees, lengths in the model's unit.
Overall bounding box: X_Min=0 X_Len=15.7882 Y_Min=-9.19663 Y_Len=18.3933 Z_Min=-1.5 Z_Len=6.07825

Wing "WingGeom"
  location (X Y Z) 5 0 1.15, rotation 0 3 0
  symmetric about XZ
  bounding box size 2.10119 18.3933 0.456498
  mass: Density=0 Shell_Flag=1 Mass_Area=16.75 Mass_Prior=1
  totals: TotalSpan=18.2753 TotalProjectedSpan=18.269 TotalChord=1.49814 TotalArea=28 TotalAR=11.9199
  root: chord 2.10359, twist 0, NACA 63-series A=1 IdealCl=0.5 ThickChord=0.18
  sections:
    n  Span     Root_Chord  Tip_Chord  Area     Sweep  Sweep_Location  Dihedral  Twist  Twist_Location  tip airfoil
    1  5.15932  2.10359     1.41859    9.08601  0      0.5             1.5       0      0.25            NACA 64-series A=1 IdealCl=0.5 ThickChord=0.18
    2  3.97833  1.41859     1.05179    4.91399  0      0.5             1.5       0      0.25            NACA 64-series A=1 IdealCl=0.5 ThickChord=0.12
  SS_Control "ailerons": UStart=0.357843 UEnd=0.65 Length_C_Start=0.25 Length_C_End=0.25 Length_Start=0.347904 Length_End=0.267533 LE_Flag=0 Surf_Type=2

Fuselage "Nacells", child of "WingGeom"
  location (X Y Z) 4.2 2.5 1.05, rotation 0 0 0; relative location -0.8 2.5 -0.1, rotation 0 0 0
  symmetric about XZ
  bounding box size 2.40355 5.71833 0.912665
  mass: Density=0 Shell_Flag=0 Mass_Area=1 Mass_Prior=0 PointMass=325 CGx=0.6 CGy=0 CGz=-0.1 Ixx=0 Iyy=0 Izz=0 Ixy=0 Ixz=0 Iyz=0
  Design: Length=2.3
  cross sections:
    n  XLocPercent  YLocPercent  ZLocPercent  shape
    0  0            0            0            circle Circle_Diameter=0.5
    1  0.25         0            -0.045       super ellipse Super_Height=0.9 Super_M=3 Super_MaxWidthLoc=0 Super_N=2 Super_Width=0.6
    2  0.5          0            -0.024       super ellipse Super_Height=0.8 Super_M=3 Super_MaxWidthLoc=0 Super_N=2 Super_Width=0.6
    3  0.7          0            0.01         super ellipse Super_Height=0.6 Super_M=3 Super_MaxWidthLoc=0 Super_N=2 Super_Width=0.6
    4  0.826087     0            0.04         super ellipse Super_Height=0.4 Super_M=3 Super_MaxWidthLoc=0 Super_N=2 Super_Width=0.4
    5  0.934783     0            0.07         super ellipse Super_Height=0.2 Super_M=3 Super_MaxWidthLoc=0 Super_N=2 Super_Width=0.2
    6  1            0            0.09         super ellipse Super_Height=0 Super_M=2 Super_MaxWidthLoc=0 Super_N=2 Super_Width=0

Conformal "InboardTank", child of "WingGeom"
  location (X Y Z) 5 0 1.15, rotation 0 3 0; relative location 0 0 0, rotation 0 0 0
  symmetric about XZ
  bounding box size 1.12742 4.12604 0.245666
  mass: Density=800 Shell_Flag=0 Mass_Area=1 Mass_Prior=2
  Design: ChordTrimFlag=1 ChordTrimMax=0.85 ChordTrimMin=0.25 L01Max=1 L01Min=1 L0LenTrimMax=3.09532 L0LenTrimMin=1.56513 LTrimMax=0.338663 LTrimMin=0.171243 Offset=0.06 Side1Trim=0.1 Side1TrimFlag=0 Side2Trim=0.1 Side2TrimFlag=0 Side3Trim=0.1 Side3TrimFlag=0 Side4Trim=0.1 Side4TrimFlag=0 UMaxTrimTypeFalg=0 UMinTrimTypeFalg=0 UTrimFlag=1 UTrimMax=0.2 UTrimMin=0.101129 V1TrimBegin=0.875662 V1TrimEnd=0.124338 V1TrimFlag=1 V2TrimBegin=0.422491 V2TrimEnd=0.577509 V2TrimFlag=1

Conformal "OutboardTank", child of "WingGeom"
  location (X Y Z) 5 0 1.15, rotation 0 3 0; relative location 0 0 0, rotation 0 0 0
  symmetric about XZ
  bounding box size 0.959107 10.3151 0.206557
  mass: Density=800 Shell_Flag=0 Mass_Area=1 Mass_Prior=2
  Design: ChordTrimFlag=1 ChordTrimMax=0.85 ChordTrimMin=0.25 L01Max=1 L01Min=1 L0LenTrimMax=7.1479 L0LenTrimMin=4.64297 LTrimMax=0.782062 LTrimMin=0.507995 Offset=0.06 Side1Trim=0.1 Side1TrimFlag=0 Side2Trim=0.1 Side2TrimFlag=0 Side3Trim=0.1 Side3TrimFlag=0 Side4Trim=0.1 Side4TrimFlag=0 UMaxTrimTypeFalg=0 UMinTrimTypeFalg=0 UTrimFlag=1 UTrimMax=0.5 UTrimMin=0.3 V1TrimBegin=0.875662 V1TrimEnd=0.124338 V1TrimFlag=1 V2TrimBegin=0.422491 V2TrimEnd=0.577509 V2TrimFlag=1

BodyOfRevolution "MainGear", child of "WingGeom"
  location (X Y Z) 6.6 -1.2 -1.1, rotation 0 0 90
  symmetric about XZ
  bounding box size 0.666667 2.4 0.666667
  mass: Density=1 Shell_Flag=0 Mass_Area=1 Mass_Prior=0 PointMass=93 CGx=0 CGy=0 CGz=0 Ixx=0 Iyy=0 Izz=0 Ixy=0 Ixz=0 Iyz=0
  Design: A0=0.15514 Ae=0.15514 Amin=0.0387851 AminW=0.25 Angle=0 Diameter=0.444444 Mode=0
  profile: circle Circle_Diameter=0.222222

BodyOfRevolution "NoseGear", child of "WingGeom"
  location (X Y Z) 2.1 -0.1 -1.25, rotation 0 0 90
  bounding box size 0.5 0.2 0.5
  mass: Density=1 Shell_Flag=0 Mass_Area=1 Mass_Prior=0 PointMass=62 CGx=0 CGy=0 CGz=0 Ixx=0 Iyy=0 Izz=0 Ixy=0 Ixz=0 Iyz=0
  Design: A0=0.0706858 Ae=0.0706858 Amin=0.00785398 AminW=0.25 Angle=0 Diameter=0.3 Mode=0
  profile: circle Circle_Diameter=0.2

Fuselage "FuselageGeom"
  location (X Y Z) 0 0 -0.22, rotation 0 0 0
  bounding box size 15.77 1.95 2.25
  mass: Density=0 Shell_Flag=1 Mass_Area=12.87 Mass_Prior=2 PointMass=7.5 CGx=0 CGy=0 CGz=0 Ixx=0 Iyy=0 Izz=0 Ixy=0 Ixz=0 Iyz=0
  Design: Length=15.77
  cross sections:
    n  XLocPercent  YLocPercent  ZLocPercent  shape
    0  0            0            0            point
    1  0.15         0            0.007        super ellipse Super_Height=1.75 Super_M=2 Super_MaxWidthLoc=0 Super_N=5 Super_Width=1.7
    2  0.196        0            0.021        super ellipse Super_Height=2.25 Super_M=2 Super_MaxWidthLoc=0 Super_N=5 Super_Width=1.95
    3  0.375        0            0.021        as above
    4  0.5882       0            0.022        super ellipse Super_Height=2.15 Super_M=2 Super_MaxWidthLoc=0 Super_N=5 Super_Width=1.85
    5  1            0            0.03         point

Custom "Pilots", child of "FuselageGeom"
  location (X Y Z) 2.3 -0.475 -0.15, rotation 0 0 0
  bounding box size 0.910402 1.4 1.33029
  mass: Density=0 Shell_Flag=0 Mass_Area=1 Mass_Prior=5 PointMass=48.75 CGx=0.5 CGy=0.5 CGz=0 Ixx=0 Iyy=0 Izz=0 Ixy=0 Ixz=0 Iyz=0
  Design: BackAngle=25 BackHeight=0.9 BackThick=0.1 SeatHeight=0.45 SeatLength=0.5 Width=0.45
  Layout: AisleWidth=0.001 NumLeft=0 NumMiddle=2 NumRight=0 NumRow=1 SeatGap=0.5 SeatPitch=1
  custom script SeatGroup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

Blank "Avionics", child of "FuselageGeom"
  location (X Y Z) 0 0 0, rotation 0 0 0
  mass: Density=1 Shell_Flag=0 Mass_Area=1 Mass_Prior=0 PointMass=40 CGx=2.2 CGy=0 CGz=0 Ixx=0 Iyy=0 Izz=0 Ixy=0 Ixz=0 Iyz=0

Blank "Radar", child of "FuselageGeom"
  location (X Y Z) 0 0 0, rotation 0 0 0
  mass: Density=1 Shell_Flag=0 Mass_Area=1 Mass_Prior=0 PointMass=20 CGx=1.5 CGy=0 CGz=-0.2 Ixx=0 Iyy=0 Izz=0 Ixy=0 Ixz=0 Iyz=0

Wing "VT", child of "FuselageGeom"
  location (X Y Z) 12.5823 0 0.48, rotation 90 0 0
  bounding box size 3.20588 0.350031 4.09825
  mass: Density=0 Shell_Flag=1 Mass_Area=2.4 Mass_Prior=0
  totals: TotalSpan=4 TotalProjectedSpan=4 TotalChord=2 TotalArea=8 TotalAR=2
  root: chord 2.5, twist 0, NACA 65-series A=1 IdealCl=0 ThickChord=0.14
  sections:
    n  Span  Root_Chord  Tip_Chord  Area  Sweep  Sweep_Location  Dihedral  Twist  Twist_Location  tip airfoil
    1  4     2.5         1.5        8     20     0.25            0         0      0.25            as above
  SS_Control "rudder": UStart=0.4 UEnd=0.6 Length_C_Start=0.25 Length_C_End=0.25 Length_Start=0.575 Length_End=0.425 LE_Flag=0 Surf_Type=2

Wing "HT", child of "VT"
  location (X Y Z) 13.4 0 1.6, rotation 0 8 0
  symmetric about XZ
  bounding box size 1.46889 6.15631 0.406041
  mass: Density=0 Shell_Flag=1 Mass_Area=2.4 Mass_Prior=1
  totals: TotalSpan=6 TotalProjectedSpan=5.99178 TotalChord=1.33333 TotalArea=8 TotalAR=4.48767
  root: chord 1.48148, twist 0, NACA 4-series Camber=0.04 CamberLoc=0.4 Invert=1 ThickChord=0.14
  sections:
    n  Span  Root_Chord  Tip_Chord  Area  Sweep  Sweep_Location  Dihedral  Twist  Twist_Location  tip airfoil
    1  3     1.48148     1.18519    4     3      0.25            3         0      0.25            as above
  SS_Control "elevator": UStart=0.4 UEnd=0.644689 Length_C_Start=0.25 Length_C_End=0.25 Length_Start=0.355556 Length_End=0.30118 LE_Flag=0 Surf_Type=2

Custom "SeatGroup-front", child of "FuselageGeom"
  location (X Y Z) 3.8 -0.6 -0.35, rotation 0 0 0
  bounding box size 3.79991 1.652 1.39074
  mass: Density=0 Shell_Flag=0 Mass_Area=1 Mass_Prior=4 PointMass=3.75 CGx=2.3 CGy=0.65 CGz=0 Ixx=0 Iyy=0 Izz=0 Ixy=0 Ixz=0 Iyz=0
  Design: BackAngle=15 BackHeight=0.8 BackThick=0.1 SeatHeight=0.45 SeatLength=0.45 Width=0.45
  Layout: AisleWidth=0.3 NumLeft=2 NumMiddle=1 NumRight=0 NumRow=5 SeatGap=0.001 SeatPitch=0.8
  custom script SeatGroup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

Custom "Seat-alone", child of "SeatGroup-front"
  location (X Y Z) 7.8 0.6 -0.35, rotation 0 0 0; relative location 4 1.2 0, rotation 0 0 0
  bounding box size 0.599911 0.45 1.39074
  mass: Density=1 Shell_Flag=0 Mass_Area=1 Mass_Prior=4 PointMass=3.75 CGx=0.55 CGy=0 CGz=0 Ixx=0 Iyy=0 Izz=0 Ixy=0 Ixz=0 Iyz=0
  Design: BackAngle=15 BackHeight=0.8 BackThick=0.1 SeatHeight=0.45 SeatLength=0.45 Width=0.45
  Layout: AisleWidth=1 NumLeft=0 NumMiddle=0 NumRight=1 NumRow=1 SeatGap=0.2 SeatPitch=1
  custom script SeatGroup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

Custom "Pax-alone", child of "Seat-alone"
  location (X Y Z) 7.8 0.6 -0.35, rotation 0 0 0; relative location 0 0 0, rotation 0 0 0
  bounding box size 0.599911 0.45 1.39074
  mass: Density=1 Shell_Flag=0 Mass_Area=1 Mass_Prior=5 PointMass=49.25 CGx=0.55 CGy=0 CGz=0 Ixx=0 Iyy=0 Izz=0 Ixy=0 Ixz=0 Iyz=0
  Design: BackAngle=15 BackHeight=0.8 BackThick=0.1 SeatHeight=0.45 SeatLength=0.45 Width=0.45
  Layout: AisleWidth=1 NumLeft=0 NumMiddle=0 NumRight=1 NumRow=1 SeatGap=0.2 SeatPitch=1
  custom script SeatGroup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

Custom "Seat-back", child of "SeatGroup-front"
  location (X Y Z) 8.8 -0.4 -0.35, rotation 0 0 0; relative location 5 0.2 0, rotation 0 0 0
  bounding box size 0.599911 1.352 1.39074
  mass: Density=1 Shell_Flag=0 Mass_Area=1 Mass_Prior=4 PointMass=49.25 CGx=0.5 CGy=0.45 CGz=0 Ixx=0 Iyy=0 Izz=0 Ixy=0 Ixz=0 Iyz=0
  Design: BackAngle=15 BackHeight=0.8 BackThick=0.1 SeatHeight=0.45 SeatLength=0.45 Width=0.45
  Layout: AisleWidth=1 NumLeft=0 NumMiddle=3 NumRight=0 NumRow=1 SeatGap=0.001 SeatPitch=1
  custom script SeatGroup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

Custom "PaxGroup-back", child of "Seat-back"
  location (X Y Z) 8.8 -0.4 -0.35, rotation 0 0 0; relative location 0 0 0, rotation 0 0 0
  bounding box size 0.599911 1.352 1.39074
  mass: Density=1 Shell_Flag=0 Mass_Area=1 Mass_Prior=5 PointMass=49.25 CGx=0.5 CGy=0.45 CGz=0 Ixx=0 Iyy=0 Izz=0 Ixy=0 Ixz=0 Iyz=0
  Design: BackAngle=15 BackHeight=0.8 BackThick=0.1 SeatHeight=0.45 SeatLength=0.45 Width=0.45
  Layout: AisleWidth=1 NumLeft=0 NumMiddle=3 NumRight=0 NumRow=1 SeatGap=0.001 SeatPitch=1
  custom script SeatGroup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

Custom "PaxGroup-front", child of "SeatGroup-front"
  location (X Y Z) 3.8 -0.6 -0.35, rotation 0 0 0
  bounding box size 3.79991 1.652 1.39074
  mass: Density=0 Shell_Flag=0 Mass_Area=1 Mass_Prior=5 PointMass=49.25 CGx=2.3 CGy=0.65 CGz=0 Ixx=0 Iyy=0 Izz=0 Ixy=0 Ixz=0 Iyz=0
  Design: BackAngle=15 BackHeight=0.8 BackThick=0.1 SeatHeight=0.45 SeatLength=0.45 Width=0.45
  Layout: AisleWidth=0.3 NumLeft=2 NumMiddle=1 NumRight=0 NumRow=5 SeatGap=0.001 SeatPitch=0.8
  custom script SeatGroup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

VSPAERO settings: Sref=28 bref=18.2753 cref=1.49814 Xcg=6.23006 Ycg=0.0256266 Zcg=0.310359 AlphaStart=-5 AlphaEnd=5 AlphaNpts=3 BetaStart=0 BetaEnd=0 BetaNpts=1 MachStart=0.16 MachEnd=0 MachNpts=1 ReCref=1e+07 Vinf=53 Rho=1.225
  control group "WingGeom_ailerons": DeflectionAngle=15
  control group "VT_rudder": DeflectionAngle=0
  control group "HT_elevator": DeflectionAngle=0
